*Heading
** Job name: Job-2 Model name: Model-1
** Generated by: Abaqus/CAE 6.13-3
*Preprint, echo=NO, model=YES, history=NO, contact=NO
** ----------------------------------------------------------------
**
** PART INSTANCE: truncated_octahedron_reference_s-1
**
*Node
      1,         62.5,  -29.4627819,  -104.166664
      2,   41.6666679,           0.,        -125.
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*Element, type=SC8R
 1,  5,  6,  7,  8,  1,  2,  3,  4
 2,  7, 11, 12,  8,  3,  9, 10,  4
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*System
**
** MATERIALS
**
*Material, name=Material-1
*Density
0.,
*Elastic
5., 0.45
** ----------------------------------------------------------------
**
** STEP: Step-1
**
*Step, name=Step-1, nlgeom=NO
*Static
1., 1., 1e-05, 1.
**
** OUTPUT REQUESTS
**
*Restart, write, frequency=0
**
** FIELD OUTPUT: F-Output-1
**
*Output, field, variable=PRESELECT
**
** HISTORY OUTPUT: H-Output-1
**
*Output, history, variable=PRESELECT
*End Step
